*Heading
** Job name: bcc Model name: Model-1
** Generated by: Abaqus/CAE 2019.HF24
*Preprint, echo=NO, model=NO, history=NO, contact=NO
**
** PARTS
**
*Part, name=sc_bcc
*Node
      1,           0.,   8.80000019,   5.84852791
      2,   1.20000005,          10.,   5.84852791
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*Element, type=C3D10
   1,  1368,  1369,  1370,  1371,  2223,  2222,  2221,  2225,  2224,  2226
   2,  1372,  1373,  1374,  1375,  2229,  2228,  2227,  2231,  2230,  2232
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*Nset, nset=Set-1, generate
     1,  14280,      1
*Elset, elset=Set-1, generate
    1,  8440,     1
*Nset, nset=top
     2,     3,     6,    10,    19,    21
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*Elset, elset=top
  427,  445,  519,  742, 1311, 1607
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** Section: Section-1
*Solid Section, elset=Set-1, material=Material-1
,
*End Part
**
**
** ASSEMBLY
**
*Assembly, name=Assembly
**
*Instance, name=sc_bcc-1, part=sc_bcc
*End Instance
**
*Nset, nset=Set-1, instance=sc_bcc-1
    26,    30,    33,    34,    35,    38
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*Elset, elset=Set-1, instance=sc_bcc-1
 1199, 1418, 1805, 1897, 2282, 3007
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*Nset, nset=Set-2, instance=sc_bcc-1
     2,     3,     6,    10,    19,    21
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*Elset, elset=Set-2, instance=sc_bcc-1
  427,  445,  519,  742, 1311, 1607
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*Nset, nset=Set-3, instance=sc_bcc-1
    16,    17,    18,    20,    23,    36
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*Elset, elset=Set-3, instance=sc_bcc-1
  113,  409, 1137, 1150, 1507, 1709
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*Nset, nset=Set-4, instance=sc_bcc-1
     1,     5,     7,     8,    14,    27
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*Elset, elset=Set-4, instance=sc_bcc-1
  133,  230,  293,  393,  398,  420
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*End Assembly
*Amplitude, name=Amp-1
             0.,              0.,              1.,             0.5
**
** MATERIALS
**
*Material, name=Material-1
*Elastic
1439., 0.3
*Plastic
 21.3,   0.
  24., 0.02
  26., 0.05
** ----------------------------------------------------------------
**
** STEP: Step-1
**
*Step, name=Step-1, nlgeom=YES
*Static
0.01, 1., 1e-05, 0.05
**
** BOUNDARY CONDITIONS
**
** Name: BC-1 Type: Displacement/Rotation
*Boundary
Set-1, 1, 1
Set-1, 2, 2
Set-1, 3, 3
Set-1, 4, 4
Set-1, 5, 5
Set-1, 6, 6
** Name: BC-2 Type: Displacement/Rotation
*Boundary, amplitude=Amp-1
Set-2, 2, 2, -1.
** Name: BC-3 Type: Displacement/Rotation
*Boundary
Set-3, 3, 3
** Name: BC-4 Type: Displacement/Rotation
*Boundary
Set-4, 1, 1
**
** OUTPUT REQUESTS
**
*Restart, write, frequency=0
**
** FIELD OUTPUT: F-Output-1
**
*Output, field, variable=PRESELECT
**
** HISTORY OUTPUT: H-Output-1
**
*Output, history, variable=PRESELECT
*End Step
